units           real
neigh_modify    delay 0 every 1 check yes
atom_style      full
bond_style      harmonic
angle_style     harmonic
pair_style      lj/cut/coul/long 10.0
pair_modify     mix arithmetic
kspace_style    pppm 1e-4
special_bonds   amber

variable        temp equal 500.0
variable        seed equal 12345

atom_modify	sort 0 0

read_data       lammps.data

timestep        1.0

dump            1 all custom 1 dump.lammpstrj id element x y z
dump            2 all custom 1 dump.force id element fx fy fz
dump            3 all xyz 1 dump.xyz
dump_modify     1 element O H
dump_modify     2 element O H

thermo_style    multi
thermo          1

fix             1 all nvt temp ${temp} ${temp} 70.0
fix             2 all shake 0.0001 20 0 b 1 a 1

velocity        all create ${temp} ${seed}

mdi engine
